// COMSOL Multiphysics 6.1.0.252 model "A magnet fall in a conductor.mph"
// Outline of the model tree

Parameters
  M = 0.1[kg]  // 磁铁质量

Variables
  var1 "变量 1"
    F = intop1(mf.Jr*mf.Bphi-mf.Jphi*mf.Br)

Couplings
  intop1: Integration "积分 1" on domains 3 | axisym = on

Coordinate systems
  ie1: InfiniteElement "无限元域 1" on domains 1, 4, 6-8 | ScalingType = Cylindrical

Common definitions
  free1: DeformingDomain "变形域 1" on domains 2, 3 | smoothingType = hyperelastic
  sym1: Symmetry "对称/辊支承 1" on boundaries 3, 5, 7
  disp1: PrescribedMeshDisplacement "指定网格位移 1" on boundaries 6, 8, 12 | prescribedMeshDisplacement = {0, 0, fz}

Geometry
  geom1 "几何 1" (2D axisymmetric, length unit m)
    r1: Rectangle "矩形 1" | pos = {0, -0.85}; layername = 层 1; layer = 0.1; layerright = on; layertop = on; size = {1, 3}
    r2: Rectangle "矩形 2"
      pos = {0, -0.65}
      layername = 层 1
      layer = 0.03
      layerright = on
      layerbottom = off
      size = {0.15, 2.5}
    r3: Rectangle "矩形 3" | pos = {0, 1.6}; size = {0.05, 0.1}
    fin: Finalize "形成联合体"
    ige1: IgnoreEdges "忽略边 1" | input = fin(1) boundaries 6, 12
  autodeform1 "变形构型 1" (2D axisymmetric, length unit m)
    frommesh1: FromMesh "变形构型 1" | solution = sol1; t = 0.480306757515; touchprop = off
  autodeform2 "变形构型 2" (2D axisymmetric, length unit m)
    frommesh2: FromMesh "变形构型 2" | solution = sol1; t = 0.480306757515
  autodeform3 "变形构型 3" (2D axisymmetric, length unit m)
    frommesh3: FromMesh "变形构型 3" | solution = sol1; t = 0.480306757515
  autodeform4 "变形构型 4" (2D axisymmetric, length unit m)
    frommesh4: FromMesh "变形构型 4" | solution = sol1; t = 0.480306757515
  autodeform5 "变形构型 5" (2D axisymmetric, length unit m)
    frommesh5: FromMesh "变形构型 5" | solution = sol1; t = 0.480306757515
  autodeform6 "变形构型 6" (2D axisymmetric, length unit m)
    frommesh6: FromMesh "变形构型 6" | solution = sol1; t = 0.480306757515
  autodeform7 "变形构型 7" (2D axisymmetric, length unit m)
    frommesh7: FromMesh "变形构型 7" | solution = sol1; t = 0.480306757515
  autodeform8 "变形构型 8" (2D axisymmetric, length unit m)
    frommesh8: FromMesh "变形构型 8" | solution = sol1; t = 0.480306757515
  autodeform9 "变形构型 9" (2D axisymmetric, length unit m)
    frommesh9: FromMesh "变形构型 9" | solution = sol1; t = 0.480306757515
  autodeform10 "变形构型 10" (2D axisymmetric, length unit m)
    frommesh10: FromMesh "变形构型 10" | solution = sol1; t = 0.480306757515
  autodeform11 "变形构型 11" (2D axisymmetric, length unit m)
    frommesh11: FromMesh "变形构型 11" | solution = sol1; t = 0.480306757515
  autodeform12 "变形构型 12" (2D axisymmetric, length unit m)
    frommesh12: FromMesh "变形构型 12" | solution = sol1; t = 0.480306757515
  autodeform13 "变形构型 13" (2D axisymmetric, length unit m)
    frommesh13: FromMesh "变形构型 13" | solution = sol1; t = 0.480306757515
  autodeform14 "变形构型 14" (2D axisymmetric, length unit m)
    frommesh14: FromMesh "变形构型 14" | solution = sol1; t = 0.480306757515
  autodeform15 "变形构型 15" (2D axisymmetric, length unit m)
    frommesh15: FromMesh "变形构型 15" | solution = sol1; t = 0.480306757515
  autodeform16 "变形构型 16" (2D axisymmetric, length unit m)
    frommesh16: FromMesh "变形构型 16" | solution = sol1; t = 0.480306757515
  autodeform17 "变形构型 17" (2D axisymmetric, length unit m)
    frommesh17: FromMesh "变形构型 17" | solution = sol1; t = 0.480306757515
  autodeform18 "变形构型 18" (2D axisymmetric, length unit m)
    frommesh18: FromMesh "变形构型 18" | solution = sol1; t = 0.480306757515
  autodeform19 "变形构型 19" (2D axisymmetric, length unit m)
    frommesh19: FromMesh "变形构型 19" | solution = sol1; t = 0.480306757515
  autodeform20 "变形构型 20" (2D axisymmetric, length unit m)
    frommesh20: FromMesh "变形构型 20" | solution = sol1; t = 0.480306757515

Materials
  mat1: Common "Air" on all domains
    def "Basic"
      thermalexpansioncoefficient = alpha_p(pA,T)
      molarmass = 0.02897[kg/mol]
      bulkviscosity = muB(T)
      relpermeability = 1
      relpermittivity = 1
      dynamicviscosity = eta(T)
      ratioofspecificheat = 1.4
      electricconductivity = 1[S/m]
      heatcapacity = Cp(T)
      density = rho(pA,T)
      thermalconductivity = k(T)
      soundspeed = cs(T)
      eta: Piecewise | arg = T; pieces = {200.0, 1600.0, -8.38278E-7+8.35717342E-8*T^1-7.69429583E-11*T^2+4.6437266E-14*T^3-1.06585607E-17*T^4}; argunit = K; fununit = Pa*s
      Cp: Piecewise | arg = T; pieces = {200.0, 1600.0, 1047.63657-0.372589265*T^1+9.45304214E-4*T^2-6.02409443E-7*T^3+1.2858961E-10*T^4}; argunit = K; fununit = J/(kg*K)
      rho: Analytic | expr = pA*0.02897/R_const[K*mol/J]/T; args = {pA, T}; fununit = kg/m^3; argunit = {Pa, K}
      k: Piecewise | arg = T; pieces = {200.0, 1600.0, -0.00227583562+1.15480022E-4*T^1-7.90252856E-8*T^2+4.11702505E-11*T^3-7.43864331E-15*T^4}; argunit = K; fununit = W/(m*K)
      cs: Analytic | expr = sqrt(1.4*R_const[K*mol/J]/0.02897*T); args = T; fununit = m/s; argunit = K
      an1: Analytic | funcname = alpha_p; expr = -1/rho(pA,T)*d(rho(pA,T),T); args = {pA, T}; fununit = 1/K; argunit = {Pa, K}
      an2: Analytic "Analytic 2a" | funcname = muB; expr = 0.6*eta(T); args = T; fununit = Pa*s; argunit = K
    RefractiveIndex
      n = 1
      ki = 0
    NonlinearModel
      BA = (def.gamma+1)/2
    idealGas
      Rs = R_const/Mn
      heatcapacity = Cp(T)
      ratioofspecificheat = 1.4
      molarmass = 0.02897
      Cp: Piecewise | arg = T; pieces = {200.0, 1600.0, 1047.63657-0.372589265*T^1+9.45304214E-4*T^2-6.02409443E-7*T^3+1.2858961E-10*T^4}; argunit = K; fununit = J/(kg*K)
  mat3: Common "N52M (Sintered NdFeB)" on domains 3
    def "Basic"
      electricconductivity = 1e7
      relpermittivity = 1
    RemanentFluxDensity
      murec = 1.05
      normBr = 1.44[T]
  mat4: Common "Soft Iron (With Losses)" on domains 5
    def "Basic"
      electricconductivity = 1.12e7[S/m]
      relpermittivity = 1
      relpermeability = 4000
    BHCurve
      normB = BH(normHin)
      normH = BH_inv(normBin)
      Wpm = BH_prim(normHin)
      normHin = sqrt(H1^2+H2^2+H3^2+eps)
      DESCR_PREFIX:normHin = 磁场模
      normBin = sqrt(B1^2+B2^2+B3^2+eps)
      DESCR_PREFIX:normBin = 磁通密度模
      BH: Interpolation
        table = 
          {0, 0}
          {663.146, 1}
          {1067.5, 1.1}
          {1705.23, 1.2}
          {2463.11, 1.3}
          {3841.67, 1.4}
          {5425.74, 1.5}
          {7957.75, 1.6}
          {12298.3, 1.7}
          {20462.8, 1.8}
          {32169.6, 1.9}
          {61213.4, 2}
          {111408, 2.1}
          {188487.757, 2.2}
          {267930.364, 2.3}
          {347507.836, 2.4}
        extrap = linear
        fununit = T
        argunit = A/m
        defineinv = on
        defineprimfun = on
    EffectiveBHCurve
      normBeff = BHeff(normHeffin)
      normHeff = BHeff_inv(normBeffin)
      normHeffin = sqrt(realdot(H1,H1)+realdot(H2,H2)+realdot(H3,H3)+eps)
      DESCR_PREFIX:normHeffin = 有效磁场模
      normBeffin = sqrt(realdot(B1,B1)+realdot(B2,B2)+realdot(B3,B3)+eps)
      DESCR_PREFIX:normBeffin = 有效磁通密度模
      BHeff: Interpolation
        table = 
          {0, 0}
          {663.146, 1.00000005169}
          {1067.5, 1.49364951241}
          {1705.23, 1.94153284613}
          {2463.11, 2.25776566937}
          {3841.67, 2.60998064243}
          {5425.74, 2.86644520908}
          {7957.75, 3.14414380972}
          {12298.3, 3.44853805165}
          {20462.8, 3.78167119737}
          {32169.6, 4.05834559011}
          {61213.4, 4.42064655295}
          {111408, 4.72127408955}
          {188487.757, 4.97214814072}
          {267930.364, 5.14551086086}
          {347507.836, 5.24551086143}
        extrap = linear
        fununit = T
        argunit = A/m
        defineinv = on

Physics
  mf: InductionCurrents "磁场" on all domains
    dependent variable A = {Ar, Aphi, Az}
    al1: AmperesLaw "安培定律 1" (default)
    axi1: AxialSymmetry "轴对称 1" (default)
    mi1: MagneticInsulation "磁绝缘 1" (default)
    init1: init "初始值 1" (default)
    al2: AmperesLaw "安培定律 2" on domains 3
      e_crel_BH_RemanentFluxDensity = {0, 0, 1}
      materialType = solid
      ConstitutiveRelationBH = RemanentFluxDensity
  ge: GlobalEquations "全局常微分和微分代数方程"
    EquationForm.form = Automatic
    ge1: GlobalEquations "全局方程 1"
      name = fz
      equation = fztt + 9.8[m/s^2] - F/M
      valueType = complex
      DependentVariableQuantity = none
      CustomDependentVariableUnit = m
      SourceTermQuantity = none
      CustomSourceTermUnit = m/s^2

Mesh
  mesh1 "网格 1" (physics-controlled)
  mesh2 "网格 2"
    size: MeshSizeDefault "大小" | hmax = 0.114; hmin = 5.1E-4; hcurve = 0.3; hgrad = 1.3
    ref1: Reference "引用 1" | sequence = mesh1
  mesh3 "网格 3"
    size: MeshSizeDefault "大小" | hmax = 0.114; hmin = 5.1E-4; hcurve = 0.3; hgrad = 1.3
    ref1: Reference "引用 1" | sequence = mesh1
  mesh4 "网格 4"
    size: MeshSizeDefault "大小" | hmax = 0.114; hmin = 5.1E-4; hcurve = 0.3; hgrad = 1.3
    ref1: Reference "引用 1" | sequence = mesh1
  mesh5 "网格 5"
    size: MeshSizeDefault "大小" | hmax = 0.114; hmin = 5.1E-4; hcurve = 0.3; hgrad = 1.3
    ref1: Reference "引用 1" | sequence = mesh1
  mesh6 "网格 6"
    size: MeshSizeDefault "大小" | hmax = 0.114; hmin = 5.1E-4; hcurve = 0.3; hgrad = 1.3
    ref1: Reference "引用 1" | sequence = mesh1
  mesh7 "网格 7"
    size: MeshSizeDefault "大小" | hmax = 0.114; hmin = 5.1E-4; hcurve = 0.3; hgrad = 1.3
    ref1: Reference "引用 1" | sequence = mesh1
  mesh8 "网格 8"
    size: MeshSizeDefault "大小" | hmax = 0.114; hmin = 5.1E-4; hcurve = 0.3; hgrad = 1.3
    ref1: Reference "引用 1" | sequence = mesh1
  mesh9 "网格 9"
    size: MeshSizeDefault "大小" | hmax = 0.114; hmin = 5.1E-4; hcurve = 0.3; hgrad = 1.3
    ref1: Reference "引用 1" | sequence = mesh1
  mesh10 "网格 10"
    size: MeshSizeDefault "大小" | hmax = 0.114; hmin = 5.1E-4; hcurve = 0.3; hgrad = 1.3
    ref1: Reference "引用 1" | sequence = mesh1
  mesh11 "网格 11"
    size: MeshSizeDefault "大小" | hmax = 0.114; hmin = 5.1E-4; hcurve = 0.3; hgrad = 1.3
    ref1: Reference "引用 1" | sequence = mesh1
  mesh12 "网格 12"
    size: MeshSizeDefault "大小" | hmax = 0.114; hmin = 5.1E-4; hcurve = 0.3; hgrad = 1.3
    ref1: Reference "引用 1" | sequence = mesh1
  mesh13 "网格 13"
    size: MeshSizeDefault "大小" | hmax = 0.114; hmin = 5.1E-4; hcurve = 0.3; hgrad = 1.3
    ref1: Reference "引用 1" | sequence = mesh1
  mesh14 "网格 14"
    size: MeshSizeDefault "大小" | hmax = 0.114; hmin = 5.1E-4; hcurve = 0.3; hgrad = 1.3
    ref1: Reference "引用 1" | sequence = mesh1
  mesh15 "网格 15"
    size: MeshSizeDefault "大小" | hmax = 0.114; hmin = 5.1E-4; hcurve = 0.3; hgrad = 1.3
    ref1: Reference "引用 1" | sequence = mesh1
  mesh16 "网格 16"
    size: MeshSizeDefault "大小" | hmax = 0.114; hmin = 5.1E-4; hcurve = 0.3; hgrad = 1.3
    ref1: Reference "引用 1" | sequence = mesh1
  mesh17 "网格 17"
    size: MeshSizeDefault "大小" | hmax = 0.114; hmin = 5.1E-4; hcurve = 0.3; hgrad = 1.3
    ref1: Reference "引用 1" | sequence = mesh1
  mesh18 "网格 18"
    size: MeshSizeDefault "大小" | hmax = 0.114; hmin = 5.1E-4; hcurve = 0.3; hgrad = 1.3
    ref1: Reference "引用 1" | sequence = mesh1
  mesh19 "网格 19"
    size: MeshSizeDefault "大小" | hmax = 0.114; hmin = 5.1E-4; hcurve = 0.3; hgrad = 1.3
    ref1: Reference "引用 1" | sequence = mesh1
  mesh20 "网格 20"
    size: MeshSizeDefault "大小" | hmax = 0.114; hmin = 5.1E-4; hcurve = 0.3; hgrad = 1.3
    ref1: Reference "引用 1" | sequence = mesh1
  mesh21 "网格 21"
    size: MeshSizeDefault "大小" | hmax = 0.114; hmin = 5.1E-4; hcurve = 0.3; hgrad = 1.3
    ref1: Reference "引用 1" | sequence = mesh1

Studies
  std2 "研究 0"
    stat: Stationary "稳态" | solve for = {mf}; disabledvariables = {var1}; disabledphysics = ge/ge1
  std1 "研究 1"
    time: Transient "瞬态" | tlist = range(0,0.01,0.5); autoremesh = on

Solver configurations
  sol1 "解 1" (study std1)
    v1: Variables "因变量 1"
      comp1_spatial_disp: Field "空间网格位移 (comp1.spatial.disp)" | scalemethod = manual; scaleval = 0.0347140029383
    t1: Time "瞬态求解器 1" | tlist = range(0,0.01,0.5); tout = tstepsclosest; tstepsbdf = strict; estrat = exclude
      arDef: AutoRemesh "自动重新划分网格"
        autoremeshgeom = geom1
        stopval = 0.3
        tadapmesh = {mesh2, mesh3, mesh4, mesh5, mesh6, mesh7, mesh8, mesh9, mesh10, mesh11, mesh12, mesh13, mesh14, mesh15, mesh16, mesh17, mesh18, mesh19, mesh20, mesh21}
      dDef: Direct "直接"
      fc1: FullyCoupled "全耦合 1" | linsolver = dDef
  sol2 "对解重新划分网格 1" (study std1)
  sol3 "解 3" (study std2)
    v1: Variables "因变量 1"
      comp1_spatial_disp: Field "空间网格位移 (comp1.spatial.disp)" | scalemethod = manual; scaleval = 0.0347140029383
    s1: Stationary "稳态求解器 1"
      dDef: Direct "直接"
      fc1: FullyCoupled "全耦合 1" | linsolver = dDef

Datasets
  dset1: Solution | solution = sol1
  rev1: Revolve2D "二维旋转 1" | data = dset1; startangle = -90; revangle = 225
  dset2: Solution | solution = sol2
  rev2: Revolve2D "二维旋转 2" | data = dset2; startangle = -90; revangle = 225
  dset3: Solution | solution = sol3
  rev3: Revolve2D "二维旋转 3" | data = dset3; startangle = -90; revangle = 225

Derived values
  gev1: EvalGlobal "全局计算 1" | data = dset1; expr = fz; descr = 状态变量 fz
  gev2: EvalGlobal "全局计算 2" | data = dset2; expr = fz; descr = 状态变量 fz

Plots
  pg1: PlotGroup2D "磁通密度模 (mf)" | data = dset2; dataisaxisym = on
    surf1: Surface "表面 1" | expr = mf.normB
    str1: Streamline "流线 1" on boundaries 1-26 | expr = {mf.Br, mf.Bz}; udist = 0.03
      col1: Color "颜色表达式 1" | expr = mf.normB
      filt1: Filter "过滤器 1" | expr = !isScalingSystemDomain
    con1: Contour "等值线 1" | expr = r*mf.Aphi; levelrounding = off
      filt1: Filter "过滤器 1" | expr = !isScalingSystemDomain
  pg2: PlotGroup3D "磁通密度模，回转几何 (mf)" | data = rev2
    vol1: Volume "体 1" | expr = mf.normB
    con1: Contour "等值线 1" | expr = r*mf.Aphi; levelrounding = off
      filt1: Filter "过滤器 1" | expr = !isScalingSystemDomain
  pg3: PlotGroup1D "一维绘图组 3" | data = dset1
    glob1: Global "全局 1" | data = dset2; expr = {fz, fzt}; descr = {状态变量 fz, 状态变量 fz，一阶时间导数}
  pg4: PlotGroup2D "磁通密度模 (mf) 1" | data = dset2; dataisaxisym = on
    surf1: Surface "表面 1" | expr = mf.normB
    str1: Streamline "流线 1" on boundaries 1-26 | expr = {mf.Br, mf.Bz}; udist = 0.03
      col1: Color "颜色表达式 1" | expr = mf.normB
      filt1: Filter "过滤器 1" | expr = !isScalingSystemDomain
    con1: Contour "等值线 1" | expr = r*mf.Aphi; levelrounding = off
      filt1: Filter "过滤器 1" | expr = !isScalingSystemDomain
  pg5: PlotGroup3D "磁通密度模，回转几何 (mf) 1" | data = rev2
    vol1: Volume "体 1" | expr = mf.normB
    con1: Contour "等值线 1" | expr = r*mf.Aphi; levelrounding = off
      filt1: Filter "过滤器 1" | expr = !isScalingSystemDomain
  pg6: PlotGroup1D "一维绘图组 6" | data = dset2
    glob1: Global "全局 1" | expr = {fz, fzt}; descr = {状态变量 fz, 状态变量 fz，一阶时间导数}
  pg7: PlotGroup2D "磁通密度模 (mf) 2" | data = dset3; dataisaxisym = on
    surf1: Surface "表面 1" | expr = mf.normB
    str1: Streamline "流线 1" on boundaries 1-26 | expr = {mf.Br, mf.Bz}; udist = 0.03
      col1: Color "颜色表达式 1" | expr = mf.normB
      filt1: Filter "过滤器 1" | expr = !isScalingSystemDomain
    con1: Contour "等值线 1" | expr = r*mf.Aphi; levelrounding = off
      filt1: Filter "过滤器 1" | expr = !isScalingSystemDomain
  pg8: PlotGroup3D "磁通密度模，回转几何 (mf) 2" | data = rev3
    vol1: Volume "体 1" | expr = mf.normB
    con1: Contour "等值线 1" | expr = r*mf.Aphi; levelrounding = off
      filt1: Filter "过滤器 1" | expr = !isScalingSystemDomain