// COMSOL Multiphysics 6.1.0.252 model "Mixers_2d_example.mph"
// Outline of the model tree

Parameters
  TIME = 0[s]

Functions
  rm1: Ramp "斜坡 1" | slope = 5

Pairs
  ap1: Identity "一致边界对 1" | source: boundaries 18, 19, 22, 23; destination: boundaries 52-55
  ap2: Identity "一致边界对 2" | source: boundaries 12-15; destination: boundaries 36-39

Common definitions
  rot1: RotatingDomain "旋转域 1" on domains 3
    rotationType = rotationalVelocity
    rotationalVelocityExpression = generalRevolutionsPerTime
    angularVelocity = 2*pi*0.3*
    revolutionsPerTime = 7.5*rm1(t/1[s])
    rotationAxisBasePoint = {2.1[cm], 0, 0}
  rot2: RotatingDomain "旋转域 2" on domains 2
    rotationType = rotationalVelocity
    rotationalVelocityExpression = generalRevolutionsPerTime
    angularVelocity = 2*pi*0.3*
    revolutionsPerTime = -15*rm1(t/1[s])
    rotationAxisBasePoint = {-3.5[cm], 0, 0}

Geometry
  geom1 "几何 1" (2D, length unit cm)
    c1: Circle "圆 1" | r = 2
    c2: Circle "圆 2" | pos = {0.7, 0}; r = 0.9
    dif1: Difference "差集 1" | input = c1; input2 = c2
    c3: Circle "圆 3" | pos = {0.7, 0}; r = 0.9
    r1: Rectangle "矩形 1" | pos = {0.7, 0}; base = center; size = {1.4, 0.1}
    rot1: Rotate "旋转 1" | input = r1; keep = on; rot = 90; pos = {0.7, 0}
    dif2: Difference "差集 2" | input = c3; input2 = r1, rot1
    sca1: Scale "比例因子 1" | input = dif1, dif2; isotropic = 3; factor = 3
    pol1: Polygon "多边形 1" | source = table; table = {{5.5, 0.5}, {5.5, -0.5}, {7, -0.5}, {7, 0.5}, {5.5, 0.5}}
    c4: Circle "圆 4" | pos = {-3.5, 0}; r = 1.8
    r2: Rectangle "矩形 2" | pos = {-3.5, 0}; base = center; size = {2.8, 0.2}
    rot2: Rotate "旋转 2" | input = r2; keep = on; rot = 90; pos = {-3.5, 0}
    rot3: Rotate "旋转 3" | input = r2, rot2; rot = 45; pos = {-3.5, 0}
    dif3: Difference "差集 3" | input = sca1(1); input2 = c4
    c5: Circle "圆 5" | pos = {-3.5, 0}; r = 1.8
    dif4: Difference "差集 4" | input = c5; input2 = rot3(1), rot3(2)
    r3: Rectangle "矩形 3" | pos = {-4, -5.8733971724}; size = {1, 2}
    r4: Rectangle "矩形 4" | pos = {-4, 3.9358971724}; size = {1, 1.875}
    uni1: Union "并集 1" | input = dif3, pol1, r3, r4
    fin: Finalize "形成装配" | action = assembly; imprint = on
    ige1: IgnoreEdges "忽略边 1" | input = fin(1) boundaries 3-6, 10, 11, 13-15, 23, 24, 35, 36

Materials
  mat1: Common "Water, liquid" on all domains
    def "Basic"
      thermalexpansioncoefficient = alpha_p(T)
      bulkviscosity = muB(T)
      dynamicviscosity = eta(T)
      ratioofspecificheat = gamma_w(T)
      electricconductivity = 5.5e-6[S/m]
      heatcapacity = Cp(T)
      density = rho(T)
      thermalconductivity = k(T)
      soundspeed = cs(T)
      eta: Piecewise
        arg = T
        pieces = 
          {273.15, 413.15, 1.3799566804-0.021224019151*T^1+1.3604562827E-4*T^2-4.6454090319E-7*T^3+8.9042735735E-10*T^4-9.0790692686E-13*T^5+3.8457331488E-16*T^6}
          {413.15, 553.75, 0.00401235783-2.10746715E-5*T^1+3.85772275E-8*T^2-2.39730284E-11*T^3}
        argunit = K
        fununit = Pa*s
      Cp: Piecewise | arg = T; pieces = {273.15, 553.75, 12010.1471-80.4072879*T^1+0.309866854*T^2-5.38186884E-4*T^3+3.62536437E-7*T^4}; argunit = K; fununit = J/(kg*K)
      rho: Piecewise
        arg = T
        smooth = contd1
        pieces = 
          {273.15, 293.15, 6.3092789034e-05*T^3-0.0603676398829*T^2+18.9229382407066*T-950.704055329848}
          {293.15, 373.15, 1.0335053319e-05*T^3-0.0133950656345*T^2+4.96928883266*T+432.257114008512}
        argunit = K
        fununit = kg/m^3
      k: Piecewise | arg = T; pieces = {273.15, 553.75, -0.869083936+0.00894880345*T^1-1.58366345E-5*T^2+7.97543259E-9*T^3}; argunit = K; fununit = W/(m*K)
      cs: Interpolation | table = {{273, 1403}, {278, 1427}, {283, 1447}, {293, 1481}, {303, 1507}, {313, 1526}, {323, 1541}, {333, 1552}, {343, 1555}, {353, 1555}, {363, 1550}, {373, 1543}}; interp = piecewisecubic; fununit = m/s; argunit = K
      an1: Analytic | funcname = alpha_p; expr = -1/rho(T)*d(rho(T),T); args = T; fununit = 1/K; argunit = K
      an2: Analytic | funcname = gamma_w; expr = 1+(T/Cp(T))*(alpha_p(T)*cs(T))^2; args = T; fununit = 1; argunit = K
      an3: Analytic | funcname = muB; expr = 2.79*eta(T); args = T; fununit = Pa*s; argunit = K
  mat2: Common "Alcohol" on all domains
    // same settings as mat1
  mpmat1: Multiphase "多相材料 1" on domains 1-3
    def "基本"
      MIXING_RULE_PREFIX:density = volume_average
      MIXING_RULE_PREFIX:dynamicviscosity = volume_average
      MIXING_RULE_PREFIX:thermalexpansioncoefficient = volume_average
      MIXING_RULE_PREFIX:bulkviscosity = volume_average
      MIXING_RULE_PREFIX:ratioofspecificheat = mass_average
      MIXING_RULE_PREFIX:electricconductivity = volume_average
      MIXING_RULE_PREFIX:heatcapacity = mass_average
      MIXING_RULE_PREFIX:thermalconductivity = volume_average
      MIXING_RULE_PREFIX:soundspeed = volume_average
    phase1: PhaseLink "相 1" | link = mat1
    phase2: PhaseLink "相 2" | link = mat2

Physics
  spf: LaminarFlow "层流" on all domains
    dependent variable u = {u, v, w}
    fp1: FluidProperties "流体属性 1" (default)
    init1: init "初始值 1" (default)
    wallbc1: WallBC "壁 1" (default) | BoundaryCondition = NoSlip
    dcont1: Continuity "流动连续性 1" (default)
    inl1: InletBoundary "入口_alcohol" on boundaries 4 | U0in = 0.05
    inl2: InletBoundary "入口_water" on boundaries 2 | U0in = 0.05
    out1: OutletBoundary "出口_mixture" on boundaries 9
  pf: PhaseField "相场" on all domains
    dependent variable phipf
    AdvancedSettingProperty.ConvectiveTerm = NonConservativeForm
    pfm1: PhaseFieldModel "相场模型 1" (default) | chi = 1e-4
    init1: init "初始值-water" (default)
    initfluid2: initFluid2 "初始值，Alcohol" on no domains
    ww1: WettedWall "润湿壁 1" (default) | thetaw = pi/3
    dcont1: Continuity "连续性 1" (default)
    inl1: InletBoundary "入口 1" on boundaries 4
    inl2: InletBoundary "入口 2" on boundaries 2 | pfcond = Fluid2pf
    out1: Outlet "出口 1" on boundaries 9

Multiphysics
  tpf1: TwoPhaseFlowPhaseField "两相流，相场 1" on domains 1-3
    multiphaseMaterialList = mpmat1
    IncludeSurfaceTension = 0
    Fluid_physics = spf
    Mathematics_physics = pf

Mesh
  mesh1 "网格 1" (physics-controlled)
    size: MeshSizeDefault "大小" | table = cfd; hauto = 3

Studies
  std2 "研究 2"
    time: Transient "瞬态" | tlist = range(0,0.005,1); usertol = on; rtol = 0.006; autoremesh = on

Solver configurations
  sol2 "解 2" (study std2)
    v1: Variables "因变量 1"
    t1: Time "瞬态求解器 1"
      tlist = range(0,0.005,1)
      rtol = 0.006
      atolglobalfactor = 0.05
      atolmethod = {comp1_p, scaled, comp1_u, global, comp1_ode1, global}
      atolvaluemethod = {comp1_p, factor, comp1_u, factor, comp1_ode1, factor}
      atolfactor = {comp1_p, 1, comp1_u, 0.1, comp1_ode1, 0.1}
      maxorder = 2
      stabcntrl = on
      bwinitstepfrac = 0.01
      estrat = exclude
      rhoinf = 0.5
      predictor = constant
      arDef: AutoRemesh "自动重新划分网格" | autoremeshgeom = geom1; stopcondtype = distortion
      fc1: FullyCoupled "全耦合 1"
        linsolver = d1
        maxiter = 8
        ntolfact = 0.5
        damp = 0.9
        jtech = once
        stabacc = aacc
        aaccdim = 5
        aaccmix = 0.9
        aaccdelay = 1
      d1: Direct "直接，流体流动变量 ()" | linsolver = pardiso; pivotperturb = 1.0E-13
  sol3 "对解重新划分网格 1" (study std2)

Datasets
  dset2: Solution | solution = sol2
  dset3: Solution | solution = sol3

Plots
  pg1: PlotGroup2D "速度 (spf)" | data = dset3
    surf1: Surface "表面" | expr = spf.U