// COMSOL Multiphysics 6.1.0.252 model "6 极子？.mph"
// Outline of the model tree

Coordinate systems
  ie1: InfiniteElement "无限元域 1" on domains 1-13, 15-27

Geometry
  geom1 "几何 1" (3D, length unit m)
    blk1: Block "长方体 1"
      base = center
      size = {4, 4, 4}
      layername = 层 1
      layer = 0.1
      layerleft = on
      layerright = on
      layerfront = on
      layerback = on
      layertop = on
    pt1: Point "点 1" | p = {0.09, , }
    rot1: Rotate "旋转 1" | input = pt1; rot = range(0,60,360)
    fin: Finalize "形成联合体"

Materials
  mat1: Common "Air" on all domains
    def "Basic"
      thermalexpansioncoefficient = alpha_p(pA,T)
      molarmass = 0.02897[kg/mol]
      bulkviscosity = muB(T)
      relpermeability = 1
      relpermittivity = 1
      dynamicviscosity = eta(T)
      ratioofspecificheat = 1.4
      electricconductivity = 0[S/m]
      heatcapacity = Cp(T)
      density = rho(pA,T)
      thermalconductivity = k(T)
      soundspeed = cs(T)
      eta: Piecewise | arg = T; pieces = {200.0, 1600.0, -8.38278E-7+8.35717342E-8*T^1-7.69429583E-11*T^2+4.6437266E-14*T^3-1.06585607E-17*T^4}; argunit = K; fununit = Pa*s
      Cp: Piecewise | arg = T; pieces = {200.0, 1600.0, 1047.63657-0.372589265*T^1+9.45304214E-4*T^2-6.02409443E-7*T^3+1.2858961E-10*T^4}; argunit = K; fununit = J/(kg*K)
      rho: Analytic | expr = pA*0.02897/R_const[K*mol/J]/T; args = {pA, T}; fununit = kg/m^3; argunit = {Pa, K}
      k: Piecewise | arg = T; pieces = {200.0, 1600.0, -0.00227583562+1.15480022E-4*T^1-7.90252856E-8*T^2+4.11702505E-11*T^3-7.43864331E-15*T^4}; argunit = K; fununit = W/(m*K)
      cs: Analytic | expr = sqrt(1.4*R_const[K*mol/J]/0.02897*T); args = T; fununit = m/s; argunit = K
      an1: Analytic | funcname = alpha_p; expr = -1/rho(pA,T)*d(rho(pA,T),T); args = {pA, T}; fununit = 1/K; argunit = {Pa, K}
      an2: Analytic "Analytic 2a" | funcname = muB; expr = 0.6*eta(T); args = T; fununit = Pa*s; argunit = K
    RefractiveIndex
      n = 1
      ki = 0
    NonlinearModel
      BA = (def.gamma+1)/2
    idealGas
      Rs = R_const/Mn
      heatcapacity = Cp(T)
      ratioofspecificheat = 1.4
      molarmass = 0.02897
      Cp: Piecewise | arg = T; pieces = {200.0, 1600.0, 1047.63657-0.372589265*T^1+9.45304214E-4*T^2-6.02409443E-7*T^3+1.2858961E-10*T^4}; argunit = K; fununit = J/(kg*K)

Physics
  es: Electrostatics "静电" on all domains
    dependent variable V
    ccn1: ChargeConservation "电荷守恒 1" (default)
    zc1: ZeroCharge "零电荷 1" (default)
    init1: init "初始值 1" (default)
    pcg1: PointCharge "点电荷 1" on points 34, 35, 38 | Qp = 0.02
    pcg2: PointCharge "点电荷 2" on points 33, 36, 37 | Qp = -0.02

Mesh
  mesh1 "网格 1" (physics-controlled)
    size: MeshSizeDefault "大小" | hauto = 1

Studies
  std1 "研究 1"
    stat: Stationary "稳态"

Solver configurations
  sol1 "解 1" (study std1)
    v1: Variables "因变量 1"
    s1: Stationary "稳态求解器 1"
      fc1: FullyCoupled "全耦合 1" | linsolver = i1
      i1: Iterative "迭代 1" | linsolver = cg
        mg1: Multigrid "多重网格 1" | prefun = amg; coarseningmethod = classic

Datasets
  dset1: Solution | solution = sol1
  cpl1: CutPlane "截面 1" | data = dset1; quickplane = yx
  cln1: CutLine3D "三维截线 1" | data = dset1; genpoints = {{0.2, 0, 0}, {0.9, 0, 0}}

Plots
  pg1: PlotGroup3D "电势 (es)" | data = dset1
    mslc1: Multislice "多切面 1"
      expr = V
      multiplanexmethod = coord
      xcoord = es.CPx
      multiplaneymethod = coord
      ycoord = es.CPy
      multiplanezmethod = coord
      zcoord = es.CPz
    strmsl1: StreamlineMultislice "流线多切面 1"
      expr = {es.Ex, es.Ey, es.Ez}
      multiplanexmethod = coord
      xcoord = es.CPx
      multiplaneymethod = coord
      ycoord = es.CPy
      multiplanezmethod = coord
      zcoord = es.CPz
      udist = 0.02
      col1: Color "颜色表达式 1" | expr = V
      filt1: Filter "过滤器 1" | expr = !isScalingSystemDomain
  pg2: PlotGroup3D "电场模 (es)" | data = dset1
    mslc1: Multislice "多切面 1"
      expr = es.normE
      multiplanexmethod = coord
      xcoord = es.CPx
      multiplaneymethod = coord
      ycoord = es.CPy
      multiplanezmethod = coord
      zcoord = es.CPz
    strmsl1: StreamlineMultislice "流线多切面 1"
      expr = {es.Ex, es.Ey, es.Ez}
      multiplanexmethod = coord
      xcoord = es.CPx
      multiplaneymethod = coord
      ycoord = es.CPy
      multiplanezmethod = coord
      zcoord = es.CPz
      udist = 0.02
      col1: Color "颜色表达式 1" | expr = es.normE
      filt1: Filter "过滤器 1" | expr = !isScalingSystemDomain
  pg3: PlotGroup2D "二维绘图组 3" | data = cpl1
    surf1: Surface "表面 1" (disabled) | expr = V
    str1: Streamline "流线 1" | planecoordsys = cartesian; expr = {es.Ex, es.Ey, es.Ez}; descr = 电场; udist = 0.02
    con1: Contour "等值线 1" | expr = V
  pg4: PlotGroup1D "一维绘图组 4" | data = dset1
    lngr1: LineGraph "线结果图 1" | data = cln1; expr = V